# Метод отражений | Метод квадратных корней | Метод ортогонализации | Метод сопряжённых градиентов
SQRT :=
    A ← [2, 3 - 3i, 2 + 4i; 3 + 3i, 1, 8 + 9i; 2 - 4i, 8 - 9i, 5]
    AP ← [2, 3 - 3i, 2 + 4i; 3 + 3i, 1, 8 + 9i; 2 - 4i, 8 - 9i, 5]
    B ← [24 - 8i; 16 + 19i; 52 - 39i]
    if A[0, 1] ≠ A[1, 0] or A[0, 2] ≠ A[2, 0] or A[1, 2] ≠ A[2, 1]
        B ← transpose(A)*B
        A ← transpose(A)*A
    u11 ← sqrt(A[0, 0])
    u12 ← A[0, 1]/u11
    u13 ← A[0, 2]/u11
    u22 ← sqrt(A[1, 1] - u12*u12)
    u23 ← (A[1, 2] - (u12*u13))/u22
    u33 ← sqrt(A[2, 2] - u13*u13 - u23*u23)
    U ← [u11, u12, u13; 0, u22, u23; 0, 0, u33]
    UT ← transpose(U)
    y1 ← B[0, 0]/u11
    y2 ← (B[1, 0] - y1*transpose(U)[1, 0])/transpose(U)[1, 1]
    y3 ← (B[2, 0] - y1*transpose(U)[2, 0] - y2*transpose(U)[2, 1])/transpose(U)[2, 2]
    x3 ← y3/U[2, 2]
    x2 ← (y2 - U[1, 2]*x3)/U[1, 1]
    x1 ← (y1 - U[0, 2]*x3 - U[0, 1]*x2)/U[0, 0]
    B1 ← x1*AP[0, 0] + x2*AP[0, 1] + x3*AP[0, 2]
    B2 ← x1*AP[1, 0] + x2*AP[1, 1] + x3*AP[1, 2]
    B3 ← x1*AP[2, 0] + x2*AP[2, 1] + x3*AP[2, 2]
    T ← ["x1=", x1; "x2=", x2; "x3=", x3; "Проверка", ":"; "B1=", B1; "B2=", B2; "B3=", B3]
Grad :=
    A ← [12, 1, 3; 1, 7, -1; 3, -1, 8]
    B ← [7; -12; -3]
    i ← 1
    x[0] ← [1; 0; 0]
    r[0] ← A*x[0] - B
    rr[0] ← r[0]*r[0]
    Ar[0] ← A*r[0]
    Arr[0] ← Ar[0]*r[0]
    Bt[0] ← -rr[0]/Arr[0]
    Δ[0] ← Bt[0]*r[0]
    x[i] ← x[0] + Δ[0]
    while i ≠ 4
        r[i] ← A*x[i] - B
        Ar[i] ← A*r[i]
        AΔ[i] ← A*Δ[i - 1]
        rr[i] ← r[i]*r[i]
        rΔ[i] ← r[i]*Δ[0]
        ArΔ[i] ← Ar[i]*Δ[i - 1]
        Arr[i] ← Ar[i]*r[i]
        AΔΔ[i] ← AΔ[i]*Δ[i - 1]
        α[i] ← (rr[i]*ArΔ[i] - rΔ[i]*Arr[i])/(AΔΔ[i]*Arr[i] - ArΔ[i]^2)
        β[i] ← (rΔ[i]*ArΔ[i] - rr[i]*AΔΔ[i])/(AΔΔ[i]*Arr[i] - ArΔ[i]^2)
        Δ[i] ← α[i]*Δ[i - 1] + β[i]*r[i]
        x[i + 1] ← x[i] + Δ[i]
        i ← i + 1
    return x[3]
Ort := {
    A ← [
        -0.640, 1.640, -9.000, 2.650;
        3.659, -3.689, 9.970, -3.719;
        -3.750, 2.530, 8.779, 1.320;
        0.110, -8.750, 1.540, 2.969
    ]
    for i ∈ 0 .. 3
        a[i] ← [A[0, 0 + i]; A[1, 0 + i]; A[2, 0 + i]; A[3, 0 + i]]
    r[0] ← a[0]
    for i ∈ 1 .. 3
        r[i] ← a[i]
        for j ∈ 0 .. i
            t[j, i] ← r[j]*a[i]/(r[j]*r[j])
            d[j] ← (t[j, i]*r[j])*(-1)
            if j > 0
                f[j] ← 0
                d[j] ← d[j] + d[j - 1]
        r[i] ← r[i] + d[j] + a[i]
    b[0] ← [19.1; 51.7; -29.1; -77.3]
    j ← 0
    for i ∈ 3 .. 0
        x[i] ← r[i]*b[j]/(r[i]*a[i])
        b[j + 1] ← b[j] - x[i]*a[i]
        j ← j + 1
    B1 ← x[0]*A[0, 0] + x[1]*A[0, 1] + x[2]*A[0, 2] + x[3]*A[0, 3]
    B2 ← x[0]*A[1, 0] + x[1]*A[1, 1] + x[2]*A[1, 2] + x[3]*A[1, 3]
    B3 ← x[0]*A[2, 0] + x[1]*A[2, 1] + x[2]*A[2, 2] + x[3]*A[2, 3]
    B4 ← x[0]*A[3, 0] + x[1]*A[3, 1] + x[2]*A[3, 2] + x[3]*A[3, 3]
    M ← [
        "x1=", x[0];
        "x2=", x[1];
        "x3=", x[2];
        "x4=", x[3];
        "Проверка", ":";
        "B1=", B1;
        "B2=", B2;
        "B3=", B3;
        "B4=", B4
    ]
}
Otr :=
    A ← [
        (1 + 2i), (4 - 5i), (7 + 4i), -6 + 23i;
        (8 + 1i), (2 - 1i), (1 + 1i), 10i;
        (3 + 1i), (1 + 1i), (2 + 3i), -18 + 3i
    ]
    A0 ← [
        (1 + 2i), (4 - 5i), (7 + 4i), -6 + 23i;
        (8 + 1i), (2 - 1i), (1 + 1i), 10i;
        (3 + 1i), (1 + 1i), (2 + 3i), -18 + 3i
    ]
    E ← [1, 0, 0; 0, 1, 0; 0, 0, 1]
    for i ∈ 0 .. 1
        s[i] ← [A[0 + i, 0]; A[1, 0 + i]; A[2, 0 + i]]
        l[i] ← [E[0, 0 + i]; E[1, 0 + i]; E[2, 0 + i]]
        d[i] ← (s[i][0]*s[i][0]) + (s[i][1]*s[i][1]) + (s[i][2]*s[i][2])
        b[i] ← d[i]^(1/2)
        b[i] ← -1*b[i] if Re(d[i]) < 0
        p[i] ← sqrt(2*(d[i] + b[i]*A[0 + i, 0 + i]))
        W[i] ← 1/p[i]*(s[i] + b[i]*l[i])
        U[i] ← E - 2*W[i]*transpose(W[i])
        A ← U[i]*A
    x3 ← A[2, 3]/A[2, 2]
    x2 ← (A[1, 3] - A[1, 2]*x3)/A[1, 1]
    x1 ← (A[0, 3] - A[0, 2]*x3 - A[0, 1]*x2)/A[0, 0]
    B1 ← x1*A0[0, 0] + x2*A0[0, 1] + x3*A0[0, 2]
    B2 ← x1*A0[1, 0] + x2*A0[1, 1] + x3*A0[1, 2]
    B3 ← x1*A0[2, 0] + x2*A0[2, 1] + x3*A0[2, 2]
    T ← ["x1=", x1; "x2=", x2; "x3=", x3; "Проверка", ":"; "B1=", B1; "B2=", B2; "B3=", B3]
Grad = [1; -2; -1]
Otr = [
    "x1=", -0.00804276 + 0.217664i;
    "x2=", 0.692543 + 4.48537i;
    "x3=", -2.79995 + 2.7885i;
    "Проверка", ":";
    "B1=", -6 + 23i;
    "B2=", 10i;
    "B3=", -18 + 3i
]
Ort = [
    "x1=", 43.8482;
    "x2=", 19.2726;
    "x3=", 5.94348;
    "x4=", 26.0555;
    "Проверка", ":";
    "B1=", 19.1;
    "B2=", 51.7;
    "B3=", -29.1;
    "B4=", -77.3
]
SQRT = [
    "x1=", 5 - 2i;
    "x2=", 4 + 2i;
    "x3=", 2.37068e-14 + 1i;
    "Проверка", ":";
    "B1=", 24 - 8i;
    "B2=", 16 + 19i;
    "B3=", 52 - 39i
]
