# Метод Рунге-Кутты, Адамса и правило Рунге
# 10 вариант
F(x, y) := tanh(x + y)
a := 0
b := 0.3
y[0] := 0
x[0] := 0
n := 6
h := 0.1
RungeKutta(F, y) :=
    for i ∈ 1 .. n - 1
        x[i] ← a + i*h
    for i ∈ 0 .. n - 2
        k1 ← F(x[i], y[i])
        k2 ← F(h/2 + x[i], h*k1/2 + y[i])
        k3 ← F(h/2 + x[i], h*k2/2 + y[i])
        k4 ← F(h + x[i], h*k3 + y[i])
        y[i + 1] ← y[i] + h*((k1 + 2*k2 + 2*k3 + k4)/6)
    return augment(y)
y := RungeKutta(F, y)
y = [0; 0.00516124; 0.0212279; 0.0488591; 0.0882955; 0.139231]
X(x) :=
    for i ∈ 1 .. n - 1
        x[i] ← a + i*h
    return x
x := X(x) = [0; 0.1; 0.2; 0.3; 0.4; 0.5]
# Производные функции по x
der(x, y) :=
    for i ∈ 0 .. n - 1
        f[i] ← tanh(x[i] + y[i])
    return f
f := der(x, y) = [0; 0.104775; 0.217688; 0.335363; 0.452863; 0.564376]
# Адамс экстраполяционный
AdamsExtra(x) :=
    for i ∈ n - 3 .. n - 2
        y[i + 1] ← y[i] + h/24*(55*f[i] - 59*f[i - 1] + 37*f[i - 2] - 9*f[i - 3])
    return y
y := AdamsExtra(x) = [0; 0.00516124; 0.0212279; 0.0488591; 0.0883511; 0.13932]
# Адамс интерполяционный
AdamsInter(x) :=
    for i ∈ n - 3 .. n - 2
        y[i + 1] ← y[i] + h/24*(9*f[i + 1] + 19*f[i] - 5*f[i - 1] + f[i - 2])
    return y
y := AdamsInter(x) = [0; 0.00516124; 0.0212279; 0.0488591; 0.0882925; 0.139228]
# Правило Рунге
a := 0
n := 5
b := 0.5
y := rkfixed(y[0], a, b, n, F) = [0, 0; 0.1, 0.00516124; 0.2, 0.0212279; 0.3, 0.0488591; 0.4, 0.0882955; 0.5, 0.139231]
RuleRunge := (y[:, 1]^h - y[:, 1]^(h*2))/(2^4 - 1) = [0; 0.0161197; 0.0144998; 0.012845; 0.0112706; 0.00979479]
# Метод прогонки
# 10 вариант
a := 0.31
b := 1.45
n := 12
h := (b - a)/11
yp[0] := 1.3
n - 2 = 10
sh := 10, 9 .. 0
yp[n - 1] := 0.4
sh = [10; 9; 8; 7; 6; 5; 4; 3; 2; 1; 0]
f(x) := (sqrt((1 + x)^3) + ln(3))
B(x) := 1.1 + cos(0.5*x)
A(x) := (1 + x)^0.7
x[n - 1] := b
x[0] := a
C(x) := -(x^2)
L[0] := 0
K[0] := yp[0]
ai(x) := A(x)/h^2
ci(x) := A(x)/h^2 + B(x)/h
bi(x) := C(x) - (2*A(x)/h^2) - (B(x)/h)
Func2(f) :=
    for i ∈ 1 .. n - 2
        x[i] ← a + i*h
    for i ∈ 1 .. n - 2
        L[i] ← -ci(x[i])/(ai(x[i])*L[i - 1] + bi(x[i]))
        K[i] ← (f(x[i - 1]) - ai(x[i])*K[i - 1])/(ai(x[i])*L[i - 1] + bi(x[i]))
    for i ∈ sh
        yp[i] ← L[i]*yp[i + 1] + K[i]
    return augment(yp)
Func2(f) = [1.3; 1.00937; 0.777139; 0.597598; 0.462971; 0.367123; 0.305205; 0.273412; 0.268814; 0.289247; 0.333245; 0.4]
# Проекционный метод
a := 0.3
b := 1.45
n := 11
h := (b - a)/n = 0.104545
al := 1.3
bt := 0.4
det := a - b = -1.15
x[0] := a
matrix := [1/det, -1/det; -b/det, a/det] = [-0.869565, 0.869565; 1.26087, -0.26087]
vector := [al; bt]
x[n - 1] := b
y[0] := al
reverse := matrix*vector = [-0.782609; 1.53478]
y[n - 1] := bt
c := reverse[0] = -0.782609
d := reverse[1]
d = 1.53478
sa := -5
ea := 0
f(x) := sqrt((1 + x)^3) + ln(3*x)
sb := 5
eb := 7
B(x) := 1.1 + cos(0.5*x)
sc := 0
ec := 2
A(x) := (1 + x)^0.7
e := 0.4
C(x) := -x^2
L(u, a1, b1, c1) := a1*A(u) + b1*B(u) + c1*C(u)
step := 0.001
Proj(n, h, f, A, B, C, c, d, sa, sb, sc, ea, eb, ec) :=
    for i ∈ 1 .. n - 1
        x[i] ← a + i*h
    for i ∈ 0 .. n - 1
        u[i] ← c*x[i] + d
    gotit ← 0
    for a1 ∈ sa .. ea
        break if gotit > 0
        for b1 ∈ sb .. eb
            break if gotit > 0
            for c1 ∈ sc .. ec
                break if gotit > 0
                sum ← 0
                for i ∈ 0 .. n - 1
                    sum ← sum + |L(u[i], a1, b1, c1) - f(x[i])|
                if sum < e
                    gotit ← 1
                    for j ∈ 0 .. 2
                        a2 ← a1
                        b2 ← b1
                        c2 ← c1
    return augment(a2, b2, c2, sum)
Proj(n, h, f, A, B, C, c, d, sa, sb, sc, ea, eb, ec) =  # error: Функция не определена в одной или нескольких указанных точках.
