# Работа 1
# Задание 1
f(x) := 2*atan(x) - x + 3
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# Задание 2
f(x) := 3*x^4 - 8*x^3 - 18*x^2 + 2
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d/dx(f(x)) → 12*x^3 - 24*x^2 - 36*x
a := 3
b := 5
e := 0.01
i := 0
f(4) = -30
f(5) = 427
f(-2) = 42
Prob1 :=
    while 1
        x[i] ← (a + b)/2
        a ← x[i] if f(a)*f(x[i]) > 0
        b ← x[i] otherwise
        i ← i + 1
        break if |f(x[i - 1])| < e
    x
Prob1 = [4; 4.5; 4.25; 4.125; 4.0625; 4.09375; 4.10938; 4.11719; 4.11328; 4.11523; 4.11426; 4.11475; 4.11499; 4.11511]
f(1) = -21
f(5) = 427
# Задание 3
y1(x) := 2*sin(x + π/3)
y2(x) := 0.5*x^2 - 1
f(x) := 2*sin(x + π/3) - 0.5*x^2 + 1
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# Задание 4
y1(x) := 2*log(x)
y2(x) := x/2 - 1
f1(x) := 2*log(x) - x/2 + 1
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a := 4
b := 5
e := 0.01
i := 0
f1(5) = -0.10206
f1(4) = 0.20412
Prob2 :=
    while 1
        x[i] ← (a + b)/2
        a ← x[i] if f1(a)*f1(x[i]) > 0
        b ← x[i] otherwise
        i ← i + 1
        break if |f1(x[i - 1])| < e
    x
Prob2 = [4.5; 4.75; 4.625; 4.6875]
