# Работа 2
g(x) := 2 - 4*sin(x)
# Задание 1
g(-3.6) = 0.229918
y1(x) := -4*sin(x)
f(x) := x^2 + 4*sin(x)
y2(x) := x^2
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d^2/dx^2(f(x)) → 2 - 4*sin(x)
d/dx(f(x)) → 2*x + 4*cos(x)
f(-2) = 0.36281
f(-1) = -2.36588
x[0] := -1
b := -2
e := 0.01
i := 0
Horda1 :=
    while 1
        x[i + 1] ← x[i] - f(x[i])/(f(b) - f(x[i]))*(b - x[i])
        i ← i + 1
        break if |x[i - 1] - x[i]| < e
    x[i]
    = -1.93367
# Задание 2
f(x) := x^3 - 3*x^2 + 12*x - 9
a := 0
i := 0
e := 0.001
x[0] := 1
Horda2 :=
    while 1
        x[i + 1] ← a - f(a)/(f(x[i]) - f(a))*(x[i] - a)
        i ← i + 1
        break if |x[i - 1] - x[i]| < e
    x[i]
    = 0.889054
