# Работа 3
# Задание 1
y1(x) := -4*sin(x)
f(x) := x^2 + 4*sin(x)
y2(x) := x^2
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f1 := 2*(-2) + 4*cos(-2)
f1 = -5.66459
x[0] := -2
e := 0.01
i := 0
Kasat1 :=
    while 1
        x[i + 1] ← x[i] - f(x[i])/f1
        i ← i + 1
        break if |f(x[i - 1])| < e
    x[i]
    = -1.93376
# Задание 2
f(x) := x^3 - 3*x^2 + 12*x - 9
f1(x) := 3*x^2 - 6*x + 12
a := 1
i := 0
e := 0.001
x[0] := 0
Kasat2 :=
    while 1
        x[i + 1] ← x[i] - f(x[i])/f1(x[i])
        i ← i + 1
        break if |f(x[i - 1])| < e
    x[i]
    = 0.889041
