# Работа 4
f(x) := x^3 + 3*x^2 - 3.5
f1(x) := d/dx(f(x)) → 3*x^2 + 6*x
f11(x) := d/dx(f1(x)) → 6*x + 6
xn[0] := -3
x1n[0] := -2
i := 0
e := 0.001
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Root1 :=
    while 1
        xn[i + 1] ← xn[i] - f(xn[i])/f1(xn[i])
        x1n[i + 1] ← x1n[i] - f(xn[i])/(f1(x1n[i]) - f(xn[i]))*(x1n[i] - xn[i])
        i ← i + 1
        break if |f(xn[i])| < e
    xn[i]
Root1 = -2.38438
xn[0] := -1.9
x1n[0] := -1
i := 0
Root2 :=
    while 1
        xn[i + 1] ← xn[i] - f(xn[i])/f1(xn[i])
        x1n[i + 1] ← x1n[i] - f(xn[i])/(f1(x1n[i]) - f(xn[i]))*(x1n[i] - xn[i])
        i ← i + 1
        break if |f(xn[i])| < e
    xn[i]
Root2 = -1.55787
xn[0] := 0.1
x1n[0] := 1
i := 0
Root3 :=
    while 1
        xn[i + 1] ← xn[i] - f(xn[i])/f1(xn[i])
        x1n[i + 1] ← x1n[i] - f(xn[i])/(f1(x1n[i]) - f(xn[i]))*(x1n[i] - xn[i])
        i ← i + 1
        break if |f(xn[i])| < e
    xn[i]
Root3 = 0.942275
