# Работа 5
# Задание 1
y1(x) := 2^x
y2(x) := 2.2*x
f(x) := 2.2*x - 2^x
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f1(x) := d/dx(f(x)) → 2.2 - 2^x*ln(2)
f1(0.1) = 1.4571
x[0] := 0
e := 0.001
k := 2
i := 0
Iter1 :=
    while 1
        x[i + 1] ← x[i] - f(x[i])/k
        i ← i + 1
        break if |f(x[i])| < e
    x[i]
    = 0.780295
# Задание 2
f(x) := x^3 - 0.2*x^2 + 0.5*x - 1
x[0] := 0
e := 0.001
k := 4
i := 0
Iter2 :=
    while 1
        x[i + 1] ← x[i] - f(x[i])/k
        i ← i + 1
        break if |f(x[i])| < e
    i
    = 11
