# Работа 6
# Задание 1
e := 0.001
x[0] := 0.5
i := 0
y[0] := -0.6
f(x, y) := [sin(x + 2) - y - 1.5; x + cos(y - 2) - 0.5]
Iter :=
    while 1
        y[i + 1] ← sin(x[i] + 2) - 1.5
        x[i + 1] ← 0.5 - cos(y[i] - 2)
        i ← i + 1
        if |x[i] - x[i - 1]| ≤ e
            break if |y[i] - y[i - 1]| ≤ e
    return augment(x[i], y[i], i)
Iter = [1.34653, -1.7029, 22]
# Задание 2
f(x, y) := sin(x + y) - 1.2*x - 0.1
g(x, y) := x^2 + y^2 - 1
g1x(x, y) := d/dx(g(x, y)) → 2*x
x2[0] := -1
f1x(x, y) := d/dx(f(x, y)) → cos(x + y) - 1.2
y2[0] := -0.4
f1y(x, y) := d/dy(f(x, y)) → cos(x + y)
g1y(x, y) := d/dy(g(x, y)) → 2*y
Newton :=
    while 1
        h[i] ← (f1y(x2[i], y2[i])*g(x2[i], y2[i]) - f(x2[i], y2[i])*g1y(x2[i], y2[i]))/(f1x(x2[i], y2[i])*g1y(x2[i], y2[i]) - f1y(x2[i], y2[i])*g1x(x2[i], y2[i]))
        k[i] ← (f(x2[i], y2[i])*g1x(x2[i], y2[i]) - f1x(x2[i], y2[i])*g(x2[i], y2[i]))/(f1x(x2[i], y2[i])*g1y(x2[i], y2[i]) - f1y(x2[i], y2[i])*g1x(x2[i], y2[i]))
        x2[i + 1] ← x2[i] + h[i]
        y2[i + 1] ← y2[i] + k[i]
        i ← i + 1
        if |x2[i] - x2[i - 1]| < e
            break if |y2[i] - y2[i - 1]| < e
    return augment(x2, y2)
Newton = [-1, -0.4; -0.897905, -0.455238; -0.894873, -0.446418; -0.89481, -0.446448]
