# Задание 7.
f(x) := x^3 + 31*x^2 + 26
d/dx(f(x)) → 3*x^2 + 62*x
x1 := 0
x2 := -62/3 = -20.6667
f(-31) = 26
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f(-32) = -998
φ0(y) := y^3 - 31*y^2 - 26
d/dy(φ0(y)) → 3*y^2 - 62*y solve → [0; 62/3]
C0 := 31
φ0(1) = -56
φ0(-0.5) = -33.875
A := [1; -31; 0; -26]
B :=
    for j ∈ 0 .. 2
        B[j] ← A[0]
        for i ∈ 1 .. rows(A) - 1
            B[i] ← C0*B[i - 1] + A[i]
        C[3 - j] ← B[3 - j]
        C[0] ← 1
        A ← B
    C
    = [1; 62; 961; -26]
transpose(B) = [1, 62, 961, -26]
φ1(y) := y^3 + 620*y^2 + 96100*y - 26000
d/dy(φ1(y)) → 3*y^2 + 1240*y + 96100 solve → [-310; -310/3]
φ1(0) = -26000
C1 := 0
φ1(0) = -26000
A1 := [1; 620; 96100; 26000]
B :=
    for j ∈ 0 .. 2
        B[j] ← A1[0]
        for i ∈ 1 .. rows(A1) - 1
            B[i] ← C1*B[i - 1] + A1[i]
        Y[3 - j] ← B[3 - j]
        Y[0] ← 1
        A1 ← B
    Y
    = [1; 620; 96100; 26000]
transpose(B) = [1, 620, 96100, 26000]
26000/96100 = 0.270552
# Ответ: x=-31.0271
