# Работа 1
# 1).Интеграл по формулам левых и правых прямоугольников при n = 10, оценить результат
# Вариант 10
integral(sqrt(0.4*x^2 + 1.5)/(2.5 + sqrt(2*x + 0.8)), x = 0.8 .. 2.4) = 0.570561
Zadanie1 :=
    y(x) ← sqrt(0.4*x^2 + 1.5)/(2.5 + sqrt(2*x + 0.8))
    a ← 0.8
    b ← 2.4
    n ← 10
    h ← (b - a)/n
    for i ∈ 0 .. n
        x[i] ← a + i*h
    for i ∈ 0 .. n - 1
        sum1 ← sum1 + y(x[i])
    for i ∈ 1 .. n
        sum2 ← sum2 + y(x[i])
    I1 ← h*sum1
    I2 ← h*sum2
    I ← (I1 + I2)/2
    I
Zadanie1 = 0.570687
# 2). Интеграл по формуле средних прямоугольников, оценить результат при n1=9, n2=10
integral(cos(x^2 + 0.8)/(1.5 + sin(0.6*x + 0.5)), x = 0.4 .. 1.2) = 0.029842
Zadanie2 :=
    y(x) ← cos(x^2 + 0.8)/(1.5 + sin(0.6*x + 0.5))
    a ← 0.4
    b ← 1.2
    n1 ← 8
    n2 ← 10
    h1 ← (b - a)/n1
    h2 ← (b - a)/n2
    for i ∈ 0 .. n1 - 1
        x1[i] ← a + i*h1 + h1/2
    for i ∈ 0 .. n2 - 1
        x2[i] ← a + i*h2 + h2/2
    for i ∈ 0 .. 7
        SS1 ← SS1 + y(x1[i])
    for i ∈ 0 .. n2 - 1
        SS2 ← SS2 + y(x2[i])
    I1 ← h1*SS1
    I2 ← h2*SS2
    return augment(I1, I2)
Zadanie2 = [0.0300076, 0.0299477]
# Берём I=0.03 как более точный
# Работа 2
# 1). Вычислить интеграл по формуле трапеций
integral(1/sqrt(1 + 2*x^2), x = 0.6 .. 1.5)
Zadanie1 :=
    y(x) ← 1/sqrt(1 + 2*x^2)
    a ← 0.6
    b ← 1.5
    n ← ceil(94.86)
    h ← (b - a)/n
    for i ∈ 0 .. n
        x[i] ← a + i*h
    SS1 ← y(x)[0] + y(x)[n]
    for i ∈ 1 .. n - 1
        SS2 ← SS2 + y(x)[i]
    I ← h*(SS1/2 + SS2)
    I
Zadanie1 = 0.513712
# 2) Вычислить интеграл по формуле Симпсона, оценить погрешность результата
integral(tan(x^2 + 0.5)/(1 + 2*x^2), x = 0.4 .. 0.8) = 0.281723
Zadanie2 :=
    y(x) ← tan(x^2 + 0.5)/(1 + 2*x^2)
    a ← 0.4
    b ← 0.8
    n ← 8
    h ← (b - a)/n
    for i ∈ 0 .. n
        x[i] ← a + i*h
    SS1 ← y(x)[0] + y(x)[n]
    for i ∈ 0 .. n/2 - 1
        SS2 ← SS2 + y(x)[1 + i*2]
    for i ∈ 1 .. n/2 - 1
        SS3 ← SS3 + y(x)[i*2]
    I ← h/3*(SS1 + 4*SS2 + 2*SS3)
    I
    dy ←
        y0 ← y(x)
        for i ∈ 0 .. 7
            y1[i] ← |y0[i + 1] - y0[i]|
        for i ∈ 0 .. 6
            y2[i] ← |y1[i + 1] - y1[i]|
        for i ∈ 0 .. 5
            y3[i] ← |y2[i + 1] - y2[i]|
        for i ∈ 0 .. 4
            y4[i] ← |y3[i + 1] - y3[i]|
        y4
    MAX ← max(dy)
    R ← (b - a)*MAX/180
    dI ← (b - a)*MAX
    return augment(I, dI)
Zadanie2 = [0.281732, 0.00246405]
# Работа 3
# Найти приближённое значение интеграла по формуле "трёх восьмых"
integral((1 + 0.7*x^2)/(0.4 + sqrt(x^2 + 1.5)), x = 1.1 .. 2.9)
Zadanie :=
    y(x) ← (1 + 0.7*x^2)/(0.4 + sqrt(x^2 + 1.5))
    a ← 1.1
    b ← 2.9
    n1 ← 9
    n2 ← 12
    h1 ← (b - a)/n1
    h2 ← (b - a)/n2
    for i ∈ 0 .. n1
        x1[i] ← a + i*h1
    for i ∈ 0 .. n2
        x2[i] ← a + i*h2
    for i ∈ 0 .. n1/3 - 1
        sum1 ← y(x1)[1 + i*3] + y(x1)[2 + i*3] + sum1
    for i ∈ 1 .. n1/3 - 1
        sum2 ← y(x1)[3*i] + sum2
    I1 ← 3*h1/8*(y(x1)[0] + y(x1)[n1] + 3*sum1 + 2*sum2)
    for i ∈ 0 .. n2/3 - 1
        sum22 ← y(x2)[1 + i*3] + y(x2)[2 + i*3] + sum22
    for i ∈ 1 .. n2/3 - 1
        sum32 ← y(x2)[3*i] + sum32
    I2 ← 3*h2/8*(y(x2)[0] + y(x2)[n2] + 3*sum22 + 2*sum32)
    return augment(I1, I2)
Zadanie = [2.5134, 2.51339]
# Работа 4
# 1) Применяя экстраполяцию по Ричардсону, вычислить интеграл
integral(sqrt(x^2 + 3), x = 1 .. 4)
Zadanie1 :=
    a ← 1
    b ← 4
    n1 ← 3
    n2 ← 6
    y(x) ← sqrt(x^2 + 3)
    h1 ← (a + 3 - a)/n1
    h2 ← (a + 3 - a)/n2
    for i ∈ 0 .. n1
        x1[i] ← a + i*h1
    for i ∈ 0 .. n2
        x2[i] ← a + i*h2
    for i ∈ 1 .. n1 - 1
        SS1 ← SS1 + y(x1[i])
    for i ∈ 1 .. n2 - 1
        SS2 ← SS2 + y(x2[i])
    I1 ← h1*(SS1 + (y(x1)[0] + y(x1)[n1])/2)
    I2 ← h2*(SS2 + (y(x2)[0] + y(x2)[n2])/2)
    I3 ← I2 + n1^2/(n2^2 - n1^2)*(I2 - I1)
    I3
Zadanie1 = 9.25496
# 2) Применяя экстраполяцию по Ричардсону, вычислить интеграл:
integral(log(x^2 + 2), x = 2 .. 6)
Zadanie2 :=
    c ← 2
    a ← c
    b ← 6
    n1 ← 2
    n2 ← 4
    y(x) ← log(x^2 + 2)
    h1 ← (b - a)/n1
    h2 ← (b - a)/n2
    for i ∈ 0 .. n1
        x1[i] ← a + i*h1
    for i ∈ 0 .. n2
        x2[i] ← a + i*h2
    I1 ← h1/3*(y(x1)[0] + 4*y(x1)[1] + y(x1)[2])
    I2 ← h2/3*(y(x2)[0] + 4*y(x2)[1] + 2*y(x2)[2] + 4*y(x2)[3] + y(x2)[4])
    I3 ← I2 + n1^4/(n2^4 - n1^4)*(I2 - I1)
    I3
Zadanie2 = 4.91987
# Работа 5
# Вычислить интеграл по формуле Гаусса
integral((x + 1)/sqrt(x^2 + 1), x = -0.4 .. 1.6) = 2.44878
Zadanie :=
    y(x) ← (x + 1)/sqrt(x^2 + 1)
    a ← -0.4
    b ← 1.6
    n1 ← 4
    n2 ← 5
    t1 ← [-0.86114; -0.33998; 0.33998; 0.86114]
    t2 ← [-0.90618; -0.538469; 0; 0.538469; 0.90618]
    C1 ← [0.34785; 0.65215; 0.65215; 0.34785]
    C2 ← [0.23693; 0.47863; 0.56889; 0.47863; 0.23693]
    for i ∈ 0 .. n1 - 1
        x1[i] ← (a + b)/2 + (a - b)/2*t1[i]
    for i ∈ 0 .. n2 - 1
        x2[i] ← (a + b)/2 + (a - b)/2*t2[i]
    for i ∈ 0 .. n1 - 1
        sum1 ← sum1 + C1[i]*y(x1[i])
    for i ∈ 0 .. n2 - 1
        sum2 ← sum2 + C2[i]*y(x2[i])
    I1 ← (b - a)/2*sum1
    I2 ← (b - a)/2*sum2
    return augment(I1, I2)
Zadanie = [2.44931, 2.44872]
