# Работа 1.Интерполяционный многочлен Лагранжа
# задание 1. в неравноотностоящих узлах таблицы
# Вариант 10
x := [0.05; 0.10; 0.17; 0.25; 0.30; 0.36]
y := [0.050042; 0.100335; 0.171657; 0.255342; 0.309336; 0.376403]
X := 0.263
x := [0.41; 0.46; 0.52; 0.60; 0.65; 0.72]
y := [2.57418; 2.32513; 2.09336; 1.86203; 1.74926; 1.62098]
X := 0.478
n := 5
i := 0 .. n
# Вычисление разностей
diff := [
    X - x[0], x[0] - x[1], x[0] - x[2], x[0] - x[3], x[0] - x[4], x[0] - x[5];
    x[1] - x[0], X - x[1], x[1] - x[2], x[1] - x[3], x[1] - x[4], x[1] - x[5];
    x[2] - x[0], x[2] - x[1], X - x[2], x[2] - x[3], x[2] - x[4], x[2] - x[5];
    x[3] - x[0], x[3] - x[1], x[3] - x[2], X - x[3], x[3] - x[4], x[3] - x[5];
    x[4] - x[0], x[4] - x[1], x[4] - x[2], x[4] - x[3], X - x[4], x[4] - x[5];
    x[5] - x[0], x[5] - x[1], x[5] - x[2], x[5] - x[3], x[5] - x[4], X - x[5]
] = [
    0.068, -0.05, -0.11, -0.19, -0.24, -0.31;
    0.05, 0.018, -0.06, -0.14, -0.19, -0.26;
    0.11, 0.06, -0.042, -0.08, -0.13, -0.2;
    0.19, 0.14, 0.08, -0.122, -0.05, -0.12;
    0.24, 0.19, 0.13, 0.05, -0.172, -0.07;
    0.31, 0.26, 0.2, 0.12, 0.07, -0.242
]
# Произведение элементов по диагонали
D := [
    product(diff[0, i], i);
    product(diff[1, i], i);
    product(diff[2, i], i);
    product(diff[3, i], i);
    product(diff[4, i], i);
    product(diff[5, i], i)
] = [-5.28686e-6; 3.73464e-7; 5.76576e-7; -1.5577e-6; 3.56866e-6; -3.27687e-5]
Y := [y[0]/D[0]; y[1]/D[1]; y[2]/D[2]; y[3]/D[3]; y[4]/D[4]; y[5]/D[5]] = [-486901; 6225848; 3630675; -1195374; 490173; -49467.3]
# Сумма по y и произведение диагональных элементов таблицы разностей
sum := sum(Y[i], i = 0 .. 5) = 8614953
mult := product(X - x[i], i) = 2.61056e-7
# Приближенное значение в точке x=0.478
F(x) := mult*sum
F(0.263) = 2.24899
# задание 2. В равноотстоящих узлах таблицы
# Вариант 10
x := [0.180; 0.185; 0.190; 0.195; 0.200; 0.205]
y := [5.61543; 5.46693; 5.32634; 5.19304; 5.06649; 4.94619]
X := 0.1875
n := 5
# Шаг интерполяции
h := x[2] - x[1] = 0.005
C[i] := (-1)^(n - i)*i!*(n - i)!
# Вычисление значений для составляющих функции f(x)
i := 0 .. n
x := [0.180; 0.185; 0.190; 0.195; 0.200; 0.205]
y := [5.61543; 5.46693; 5.32634; 5.19304; 5.06649; 4.94619]
t := [(X - x[0])/h; (X - x[1])/h; (X - x[2])/h; (X - x[3])/h; (X - x[4])/h; (X - x[5])/h] = [1.5; 0.5; -0.5; -1.5; -2.5; -3.5]
C = [-120; 24; -12; 12; -24; 120]
t[i]*C[i] = [-180; 12; 6; -18; 60; -420]
y[i]/(t[i]*C[i]) = [-0.0311968; 0.455577; 0.887723; -0.288502; 0.0844415; -0.0117766]
# Составляющие функции f(x)
mult := product(t[i], i) = 4.92187
sum := sum(y[i]/(t[i]*C[i]), i = 0 .. 5) = 1.09627
# Приближенное значение в точке x=0.1875
f(x) := mult*sum
f(0.1875) = 5.39569
# Работа 2.Схема Эйткина
# Вариант 10
x := 0.5424
i := 0 .. 9
X := [0.5400; 0.5405; 0.5410; 0.5420; 0.5429; 0.5440; 0.5449; 0.5455; 0.5465; 0.5473]
y := [1.66825; 1.66636; 1.66448; 1.66071; 1.65734; 1.65322; 1.64987; 1.64764; 1.64393; 1.64097]
X[i] - x = [-0.0024; -0.0019; -0.0014; -0.0004; 0.0005; 0.0016; 0.0025; 0.0031; 0.0041; 0.0049]
# Интерполяционный многочлен 5 степени
i := 0 .. 5
F1[i] := det([y[i], X[i] - x; y[i + 1], X[i + 1] - x])/(X[i + 1] - X[i])
F1 → [1.659178; 1.659216; 1.659202; 1.65921222222; 1.65921272727; 1.65917555556]
# Интерполяционный многочлен 4 степени
j := 0 .. 4
F2[j] := det([F1[j], X[j] - x; F1[j + 1], X[j + 2] - x])/(X[j + 2] - X[j])
F2 → [1.6592692; 1.65919826667; 1.65920953216; 1.65921232323; 1.6592220202]
# Интерполяционный многочлен 3 степени
k := 0 .. 3
F3[k] := det([F2[k], X[k] - x; F2[k + 1], X[k + 3] - x])/(X[k + 3] - X[k])
F3 → [1.65918408; 1.65920718519; 1.65921083466; 1.65921366075]
# Интерполяционный многочлен 2 степени
l := 0 .. 2
F4[l] := det([F3[l], X[l] - x; F3[l + 1], X[l + 4] - x])/(X[l + 4] - X[l])
F4 → [1.65920320153; 1.65920916633; 1.65921184915]
# Решение в точке x=0.5424
# f(0.5424) = 1.659212
# Работа 3. Интерполяционная формула Ньютона
# Сумма элементов конечных разностей
sum(X, n) :=
    sum ← 0
    for i ∈ 0 .. n - 1
        sum ← sum + X[i]
    sum  # Разности крайних значений
x := [0.45; 0.46; 0.47; 0.48; 0.49; 0.50; 0.51; 0.52; 0.53; 0.54; 0.55; 0.56]
y := [20.1946; 19.6133; 18.9425; 18.1746; 17.3010; 16.3123; 15.1984; 13.9484; 12.5508; 10.9937; 9.2647; 7.3510]
P(X, n) := X[n - 1] - X[0]
# Вариант 10
x1 := 0.455
x2 := 0.5575
x3 := 0.44
x4 := 0.5674  # Нахождение нужной дельты для первой интерполяционной формулы Ньютона
Newton(y, Y, delta, n) :=
    for i ∈ 0 .. n - 1
        return delta[i] if Y - y[i] == 0
        0 otherwise
n := length(y) - 1 = 11
# Нахождение нужной дельты для второй интерполяционной формулы Ньютона
i := 0 .. n - 1  # Расчёт delta y
Newton2(y, Y, delta, n) :=
    n1 ← length(y)
    n2 ← length(delta)
    if (n2 - n1) ≥ 0
        for i ∈ 0 .. n
            return delta[i] if Y - y[i] == 0
            0 otherwise
    otherwise
        for i ∈ 0 .. n
            return delta[i + (n2 - n1)] if Y - y[i] == 0
            0 otherwise
dy[i] := y[i + 1] - y[i]
i := 0 .. n - 2  # Расчёт delta^2 y
ddy[i] := dy[i + 1] - dy[i]
# Расчёт delta^3 y
i := 0, 1 .. n - 3
dddy[i] := ddy[i + 1] - ddy[i]
dddy = [-0.0076; -0.0086; -0.0094; -0.0101; -0.0109; -0.0115; -0.0119; -0.0124; -0.0128]
dy = [-0.5813; -0.6708; -0.7679; -0.8736; -0.9887; -1.1139; -1.25; -1.3976; -1.5571; -1.729; -1.9137]
ddy = [-0.0895; -0.0971; -0.1057; -0.1151; -0.1252; -0.1361; -0.1476; -0.1595; -0.1719; -0.1847]
# Сумма конечных разностей по дельтам
sum(dy, 10) = -10.9299
sum(ddy, 9) = -1.1477
sum(dddy, 8) = -0.0824
# Произведение крайних значений по дельтам
P(y, 10) = -9.2009
P(dy, 9) = -0.9758
P(ddy, 8) = -0.07
h := x[1] - x[0] = 0.01
# Вычисление по первой интерполяционной формуле Ньютона
# задание 1 | Ближайшее число из x
x1 = 0.455
x0 := 0.46
# Число шагов | Нахождение соответствующих delta
q := (x1 - x0)/h = -0.5
y0 := Newton(x, x0, y, n) = 19.6133
dy0 := Newton(x, x0, dy, n) = -0.6708
ddy0 := Newton(x, x0, ddy, n) = -0.0971
dddy0 := Newton(x, x0, dddy, n) = -0.0086
# Первая интерполяционная формула Ньютона
y0 + q*dy0 + (q*(q - 1)*ddy0/2!) + (dddy0*(q*(q - 1)*(q - 2))/3!) = 19.915
# задание 2
# Ближайшее число из x | Нахождение соответствующих delta
x3 = 0.44
x0 := 0.45
y0 := Newton(x, x0, y, n) = 20.1946
# Число шагов
dy0 := Newton(x, x0, dy, n) = -0.5813
q := (x3 - x0)/h = -1
ddy0 := Newton(x, x0, ddy, n) = -0.0895
dddy0 := Newton(x, x0, dddy, n) = -0.0076
# Первая интерполяционная формула Ньютона
y0 + q*dy0 + (q*(q - 1)*ddy0/2!) + (dddy0*(q*(q - 1)*(q - 2))/3!) = 20.694
# Вычисление по второй интерполяционной формуле Ньютона
# задание 3
# Ближайшее число из x
x2 = 0.5575
xn := 0.56
# Число шагов | Нахождение соответствующих delta
q := (x2 - xn)/h = -0.25
yn := Newton2(x, xn, y, n) = 7.351
dyn := Newton2(x, xn, dy, n) = -1.9137
ddyn := Newton2(x, xn, ddy, n) = -0.1847
dddyn := Newton2(x, xn, dddy, n) = -0.0128
# Вторая интерполяционная формула Ньютона
yn + q*dyn + q*(q + 1)*ddyn/2! + (q*(q + 1)*(q + 2)*dddyn)/3! = 7.84744
# задание 4
# Ближайшее число из x
x4 = 0.5674
xn := 0.56
# Нахождение соответствующих delta
# Число шагов
yn := Newton2(x, xn, y, n) = 7.351
q := (x4 - xn)/h = 0.74
dyn := Newton2(x, xn, dy, n) = -1.9137
ddyn := Newton2(x, xn, ddy, n) = -0.1847
dddyn := Newton2(x, xn, dddy, n) = -0.0128
# Вторая интерполяционная формула Ньютона
yn + q*dyn + q*(q + 1)*ddyn/2! + (q*(q + 1)*(q + 2)*dddyn)/3! = 5.80843
# Работа 4.Линейная и квадратичная интерполяция
# Задание 1. Линейная интерполяция
# Вариант 10
i := 0 .. 5  # a). tg 0.2464
j := 0 .. 4
k := 0 .. 3  # б). cos 0.7312
# a).
# По таблице Брадиса выписываем ближайшие значения тангенсов
x := 0.2464
X := [0.21; 0.22; 0.23; 0.24; 0.25; 0.26]
y := [0.2131; 0.2236; 0.2341; 0.2447; 0.2553; 0.2660]
checkX[i] := X[i] - x
dyi[j] := y[j + 1] - y[j]  # Проверка на условие выполнимости
ddyi[k] := dyi[k + 1] - dyi[k]
dyi → [0.0105; 0.0105; 0.0106; 0.0106; 0.0107]
Checkddyi[k] := |ddyi[k]|
ddyi → [0.0; 0.0001; 0.0; 0.0001]
max(Checkddyi) → 0.0001  # Условие применимости выполняется
1/8*max(Checkddyi) → 0.0000125  # < 10^-4
# Ближайшее меньшее значение
x0 :=
    i ← 0
    while checkX[i] < 0
        x0 ← X[i]
        i ← i + 1
    x0
ix0 :=
    i ← 0
    while checkX[i] < 0
        i ← i + 1
    i - 1
x0 → 0.24
ix0 = 3
# Множитель для приближения в функции f(x)
q := (x - x0)/(X[2] - X[1])
q = 0.64
# Значение tg 0.2464
f(x) := y[ix0] + q*dyi[ix0] → 0.251484
# б).
x := 0.7312
X := [0.70; 0.71; 0.72; 0.73; 0.74; 0.75]
y := [0.7648; 0.7584; 0.7518; 0.7452; 0.7385; 0.7317]
checkX[i] := X[i] - x
dyi[j] := y[j + 1] - y[j]  # Проверка на условие выполнимости
ddyi[k] := dyi[k + 1] - dyi[k]
dyi → [-0.0064; -0.0066; -0.0066; -0.0067; -0.0068]
Checkddyi[k] := |ddyi[k]|
ddyi → [-0.0002; 0.0; -0.0001; -0.0001]
max(Checkddyi) → 0.0002  # Условие применимости выполняется
1/8*max(Checkddyi) → 0.000025  # < 10^-4
# Ближайшее меньшее значение
x0 :=
    i ← 0
    while checkX[i] < 0
        x0 ← X[i]
        i ← i + 1
    x0
ix0 :=
    i ← 0
    while checkX[i] < 0
        i ← i + 1
    i - 1
# Индекс ближайшего меньшего значения
x0 → 0.73
ix0 = 3
# Множитель для приближения в функции f(x)
q := (x - x0)/(X[2] - X[1])
q = 0.12
# Значение cos 0.7312
f(x) := y[ix0] + q*dyi[ix0] → 0.744396
# Задание 2. Квадратичная интерполяция
i := 0 .. 5
m := 0 .. 2
j := 0 .. 4
k := 0 .. 3
# Ближайшие значения из таблицы 1
x1 := 1.6853
x2 := 1.6838
X := [1.683; 1.684; 1.685; 1.686; 1.687; 1.688]
y := [8.8749; 8.7959; 8.7182; 8.6418; 8.5668; 8.4931]
checkX(x) := X - x
# Проверка условия применимости
dyi[j] := y[j + 1] - y[j]
checkX(x1) = [-0.0023; -0.0013; -0.0003; 0.0007; 0.0017; 0.0027]
checkX(x2) = [-0.0008; 0.0002; 0.0012; 0.0022; 0.0032; 0.0042]
dyi → [-0.079; -0.0777; -0.0764; -0.075; -0.0737]
ddyi[k] := dyi[k + 1] - dyi[k]
ddyi → [0.0013; 0.0013; 0.0014; 0.0013]
dddyi[m] := ddyi[m + 1] - ddyi[m]
dddyi → [0.0; 0.0001; -0.0001]
checkdddyi[m] := |dddyi[m]|
max(checkdddyi) → 0.0001
# Условие выполняется
1/15*max(checkdddyi) → 6.66666666667e-6  # < 10^-3
# Ближайшее значение по x для x1
x0(x) :=
    i ← 0
    while checkX(x)[i] < 0
        a ← X[i]
        i ← i + 1
    a
ix0(x) :=
    i ← 0
    while checkX(x)[i] < 0
        i ← i + 1
    i - 1
# Индекс элемента x
x0(x1) → 1.685
ix0(x1) = 2
# Ближайшее значение по x для x2
x0(x) :=
    i ← 0
    while checkX(x)[i] < 0
        a ← X[i]
        i ← i + 1
    a
ix0(x) :=
    i ← 0
    while checkX(x)[i] < 0
        i ← i + 1
    i - 1
# Индекс элемента x
x0(x2) → 1.683
ix0(x2) = 0
# Множитель для приближения в функции f(x)
q(x) := (x - x0(x))/(X[2] - X[1])
q(x) = 731.2
# Формула для нахождения значения x
f(x) := y[ix0(x)] + q(x)*dyi[ix0(x)] + q(x)*(q(x) - 1)/2*ddyi[ix0(x)]
# Значения x1 и x2
f(x1) → 8.695133
f(x2) → 8.811596
# Работа 5. Интерполяционные формулы Гаусса, Стирлинга и Бесселя
# Вариант 10
n := 10
X[1] := 1.6 + 0.006*n = 1.66
X[2] := 1.725 + 0.002*n = 1.745
X[3] := 1.83 + 0.003*n = 1.86
X[4] := 2 - 0.013*n = 1.87
# Таблица функции y(x)
x := [1.5; 1.55; 1.6; 1.65; 1.7; 1.75; 1.8; 1.85; 1.9; 1.95; 2; 2.05; 2.1]
y := [15.132; 17.422; 20.393; 23.994; 28.16; 32.812; 37.857; 43.189; 48.689; 54.225; 59.653; 64.817; 69.550]
n := length(x) = 13  # Подсчёт центральных разностей функции
i := 0 .. n - 2
dy[i] := y[i + 1] - y[i]
i := 0 .. n - 3
h := x[2] - x[1] = 0.05
ddy[i] := dy[i + 1] - dy[i]
i := 0 .. n - 4
dddy[i] := ddy[i + 1] - ddy[i]
i := 0 .. n - 5
ddddy[i] := dddy[i + 1] - dddy[i]
# Таблица конечных разностей
x = [1.5; 1.55; 1.6; 1.65; 1.7; 1.75; 1.8; 1.85; 1.9; 1.95; 2; 2.05; 2.1]
y = [15.132; 17.422; 20.393; 23.994; 28.16; 32.812; 37.857; 43.189; 48.689; 54.225; 59.653; 64.817; 69.55]
dy = [2.29; 2.971; 3.601; 4.166; 4.652; 5.045; 5.332; 5.5; 5.536; 5.428; 5.164; 4.733]
ddy = [0.681; 0.63; 0.565; 0.486; 0.393; 0.287; 0.168; 0.036; -0.108; -0.264; -0.431]
dddy = [-0.051; -0.065; -0.079; -0.093; -0.106; -0.119; -0.132; -0.144; -0.156; -0.167]
ddddy = [-0.014; -0.014; -0.014; -0.013; -0.013; -0.013; -0.012; -0.012; -0.011]
# Задание 1. Первая формула Гаусса
X[1] = 1.66  # Нахождение x0
a :=
    for i ∈ 0 .. n - 1
        if (X[1] - x[i]) < 0
            a ← i - 1
            break
        a ← i + 1 otherwise
x[a] = 1.65
# Число шагов
t := (X[1] - x[a])/h = 0.2
# Результат функции при x=1.66
GaussFirst := y[a] + t*dy[a] + ddy[a - 1]*(t*(t - 1))/2! + dddy[a - 1]*(t*(t + 1)*(t - 1))/3! = 24.7845
# Задание 2. Формула Бесселя
# Нахождение x0
X[2] = 1.745
a :=
    for i ∈ 0 .. n - 1
        if (X[2] - x[i]) < 0
            a ← i - 1
            break
        a ← i + 1 otherwise
x[a] = 1.7
# Число шагов
t := (X[2] - x[a])/h = 0.9
# Результат функции при x=1.745
Bessel := (y[a] + y[a - 1])/2 + (t - 1/2)*dy[a] + (ddy[a - 1] + ddy[a])/2*(t*(t - 1))/2! + dddy[a - 1]*((t - 1/2)*t*(t - 1))/2! = 27.9197
# Задание 3. Формула Стирлинга
# Нахождение x0
X[3] = 1.86
a :=
    for i ∈ 0 .. n - 1
        if (X[3] - x[i]) < 0
            a ← i - 1
            break
        a ← i + 1 otherwise
x[a] = 1.85
# Число шагов
t := (X[3] - x[a])/h = 0.2
# Результат функции при x=1.86
Stirling := y[a] + t*(dy[a - 1] + dy[a])/2 + ddy[a - 1]*t^2/2 + (t*(t^2 - 1))/6*(dddy[a - 2] + ddy[a - 1])/2 = 44.2748
# Задание 4. Вторая формула Гаусса
# Нахождение x0
X[4] = 1.87
a :=
    for i ∈ 0 .. n - 1
        if (X[4] - x[i]) < 0
            a ← i
            break
        a ← i + 1 otherwise
x[a] = 1.9
# Число шагов
t := (X[3] - x[a])/h = -0.8
# Результат функции при x=1.87
GaussSecond := y[a] + t*dy[a - 1] + ddy[a - 1]*(t*(t - 1))/2! + dddy[a - 2]*(t*(t + 1)*(t - 1))/3! = 44.3086
# Работа 6. Интерполяционная формула Ньютона для неравноотстоящих узлов
# Таблица 4
# Вариант 10
x1 := 0.124
x2 := 0.162
X := [0.100; 0.108; 0.119; 0.127; 0.135; 0.146; 0.157; 0.169]
y := [1.12128; 1.13160; 1.14594; 1.15648; 1.16712; 1.18191; 1.19689; 1.21344]
checkX(x) := X - x
i := 0 .. (rows(X) - 2)
# Подсчёт P1 для формулы y(x)
checkX(x1) = [-0.024; -0.016; -0.005; 0.003; 0.011; 0.022; 0.033; 0.045]
checkX(x2) = [-0.062; -0.054; -0.043; -0.035; -0.027; -0.016; -0.005; 0.007]
P1[i] := (y[i + 1] - y[i])/(X[i + 1] - X[i])
P1 → [1.29; 1.30363636364; 1.3175; 1.33; 1.34454545455; 1.36181818182; 1.37916666667]
j := 0 .. (rows(P1) - 2)
# Подсчёт P2 для формулы y(x)
P2[j] := (P1[j + 1] - P1[j])/(X[j + 2] - X[j])
P2 → [0.717703349282; 0.72966507177; 0.78125; 0.765550239234; 0.785123966942; 0.754281949934]
# Поиск левых границ
# Поиск индекса начальной границы | Поиск правых границ
x0(x) :=
    i ← 0
    while checkX(x)[i] < 0
        a ← X[i]
        i ← i + 1
    a
ix0(x) :=
    i ← 0
    b ← i
    while checkX(x)[i] < 0
        b ← i
        i ← i + 1
    b
X1(x) :=
    i ← 0
    a ← X
    while checkX(x)[i] < 0
        i ← i + 1
    a[i]
x0(x1) = 0.119
ix0(x1) = 2
X1(x1) = 0.127
x0(x2) = 0.157
ix0(x2) = 6
X1(x2) = 0.169
# Сдвиг левой границы на один шаг влево | Поиск нового индекса начальной границы | Запись прошлой левой границы в правую
X11(x) := x0(x)
x01(x) :=
    b ← "Второй способ не применим, т.к. начальный индекс был равен 0" if ix0(x) == 0
    otherwise
        i ← 0
        b ← i
        while checkX(x)[i] < 0
            b ← a
            a ← X[i]
            i ← i + 1
    b
ix01(x) :=
    b ← "Второй способ не применим, т.к. начальный индекс был равен 0" if ix0(x) == 0
    otherwise
        i ← 0
        b ← i
        while checkX(x)[i] < 0
            b ← i
            i ← i + 1
        b ← b - 1
    b
X11(x1) = 0.119
X11(x2) = 0.157
x01(x1) → 0.108
ix01(x1) = 1
x01(x2) → 0.146
ix01(x2) = 5
# Первое вычисление по интерполяционной формуле Ньютона для неравноотстоящих узлов интерполяции
f1(x) := y[ix01(x)] + P1[ix01(x)]*(x - x01(x)) + P2[ix01(x)]*(x - x01(x))*(x - X11(x))
# Результаты первого вычисления
f1(x2) → 1.20375943347
f1(x1) → 1.15251655502
# Второе вычисление по интерполяционной формуле Ньютона для неравноотстоящих узлов интерполяции
f2(x) := y[ix0(x)] + P1[ix0(x) - 1]*(x - x0(x)) + P2[ix0(x) - 1]*(x - x0(x))*(x - X1(x))
# Результаты второго вычисления
f2(x2) → 1.20367269104
f2(x1) → 1.15244723684
# Формула среднего значения по двум вычислениям
f(x) :=
    b ← f2(x) if ix0(x) == 0
    b ← (f1(x) + f2(x))/2 otherwise
    b
# За конечный результат принимаем следующие значения x1 и x2
f(x1) → 1.15248189593
f(x2) → 1.20371606225
